<Lems>

    <!--

        This LEMS file has been automatically generated using PyNeuroML v0.1.7 (libNeuroML v0.2.10)

     -->

    <!-- Specify which component to run -->
    <Target component="Simple_Golgi_Net"/>

    <!-- Include core NeuroML2 ComponentType definitions -->
    <Include file="Cells.xml"/>
    <Include file="Networks.xml"/>
    <Include file="Simulation.xml"/>

    <Include file="Simple_Golgi_Net.net.nml"/>
    <Include file="Very_Simple_Golgi_test_morph.cell.nml"/>
    <Include file="Golgi_Na.channel.nml"/>
    <Include file="Golgi_KV.channel.nml"/>
    <Include file="LeakCond.channel.nml"/>

    <Simulation id="Simple_Golgi_Net" length="450ms" step="0.0003ms" target="Simple_Golgi_Net_network">

        <Display id="display_voltages0" title="Voltages Golgi_pop0" timeScale="1ms" xmin="-45.0" xmax="495.0" ymin="-75" ymax="50">
            <Line id="Golgi_pop0[0]: Vm" quantity="Golgi_pop0[0]/v" scale="1mV" color="#b80e3b" timeScale="1ms"/>
            <Line id="Golgi_pop0[1]: Vm" quantity="Golgi_pop0[1]/v" scale="1mV" color="#30a1f6" timeScale="1ms"/>
            <Line id="Golgi_pop0[2]: Vm" quantity="Golgi_pop0[2]/v" scale="1mV" color="#577081" timeScale="1ms"/>
        </Display>

        <OutputFile id="Volts0_file0" fileName="Golgi_pop0_0_NEURON_V2010multi1.dat">
            <OutputColumn id="v0" quantity="Golgi_pop0[0]/v"/>
            <OutputColumn id="v1" quantity="Golgi_pop0[1]/v"/>
            <OutputColumn id="v2" quantity="Golgi_pop0[2]/v"/>
        </OutputFile>

    </Simulation>

</Lems>
